VY := transpose([2.23, 2.29, 2.27, 2.62, 2.72, 2.82, 3.13, 3.49, 3.82, 3.95, 4.22, 4.48, 5.06, 5.50, 5.68, 6.19, 6.42, 7.04, 7.57, 8.10])
n := 20
i := 1 .. n
VX := transpose([0.1, 0.2, 0.3, 0.4, 0.5, 0.6, 0.7, 0.8, 0.9, 1, 1.1, 1.2, 1.3, 1.4, 1.5, 1.6, 1.7, 1.8, 1.9, 2])
# Линейная регрессия | Линейная регрессия обшего вида | Аппроксимация по методу наименьших квадратов
a := intercept(VX, VY)
b := slope(VX, VY)
matr(r, c) :=
    for i ∈ 0 .. r - 1
        for j ∈ 0 .. c - 1
            M[i, j] ← 0
    M
a = 1.22074
b = 3.10406
F(x) := [1/x; x^2; exp(x)]
f(x) := a + b*x
x := 0, 0.05 .. 2
f(3) = 10.5329
corr(VX, VY) = 0.982678
K := linfit(VX, VY, F)
K = [-0.006884; -1.52843; 1.98844]
approximation(m) :=
    A ← matr(m + 1, m + 1)
    B ← matr(m + 1, 1)
    for i ∈ 0 .. m
        for j ∈ i .. i + m
            res ← 0
            for t ∈ 0 .. n - 1
                res ← res + VX[t]^j
            A[i, j - i] ← res
        sum ← 0
        for j ∈ 0 .. n - 1
            sum ← sum + VX[j]^i*VY[j]
        B[i, 0] ← sum
    lsolve(A, B)
linterp(VX, VY, 3) = 13.4
g(t) := F(t)*K
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func(x, m) :=
    p ← approximation(m)
    for j ∈ 0 .. m
        otv ← otv + p[j]*x^j
    otv
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Error(s, t) :=
    for i ∈ 1 .. rows(s)
        sqrt(1/rows(t)*sum((t[i - 1] - s[i - 1])^2, i = 1 .. rows(t)))
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STDEV :=
    for i ∈ 1 .. 11
        Err[i - 1] ← Error(func(VX, i), VY)
    Err
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STDEV = [0.337549; 0.0909429; 0.0907967; 0.0848966; 0.0848727; 0.0838677; 0.0838664; 0.0804687; 0.073259; 0.0726881; 0.0619124]
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